# Archimedes Spiral
Δ := 1  # gap between turns
Ro := 16  # Outer radius, cm
Ri := 1  # Inner Radius, cm
N := (Ro - Ri)/Δ  # number of turns
N = 15
r(θ, a, b) := a + b*θ  # Archimedes Spiral
a := Ri  # Start radius
b := Δ/(2*π)
b = 0.159155
λ := 0, π/60 .. N*2*π
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# Solve for length
L(N, a, b) := integral(sqrt((a + b*θ)^2 + (d/dθ(a + b*θ))^2), θ = 0 .. N*2*π)
L(N, a, b) = 801.327  # cm
# Solge for the diameter and hence the wires gage
Watts := 250
Volts := 23  # Heater requirements
Rs := Volts^2/Watts
Rs = 2.116  # Required Resistance
Ni := 1*10^-6
Ohm - meters  # Resistivity of Nichome
A(N, a, b, Rs) := Ni*L(N, a, b)/100/Rs  # m2  # Area as a function of N,a,b and resistance
D(N, a, b, Rs) := sqrt(A(N, a, b, Rs)*4/π)*39.37  # Inches  # Diameter as a function of length and resistance
D(N, a, b, Rs) = 0.0864505
G(N, a, b, Rs) := 36.0 - 8.62491*ln(200.0*D(N, a, b, Rs))
G(N, a, b, Rs) = 11.4179  # wire gage eguation, in inches
# 12 ga wire is a bit big
# Check gage equation
Gcheck(Din) := 36.0 - 8.62491*ln(200.0*Din)
Din := .005, .006 .. .1
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# Solve graphically for a smaller gage
ga(Δ, Ro, Ri, Rs) :=
    N ← (Ro - Ri)/Δ
    a ← Ri
    b ← Δ/(2*π)
    Q ← G(N, a, b, Rs)
    Q
r(θ, a, b) := a + θ*b
λ := 0, π/100 .. 6*2*π  # more than enough radians
L(15/4.6, 16, 1) = 538.123  # cm of 18 ga
Δ := 1, 1.1 .. 6
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# a gap of 4.6 yields 18 ga
# a 4.6 cm gap may be too big for even heating of glass, especially
# Consider nested sprials
ga(1, 16, 1, Rs) = 11.4179
ga(3, 16, 1, Rs*3) = 20.8839
ga(3, 16, 2, Rs*3) = 20.9374  # three sprials of about 21 gage
ga(3, 16, 3, Rs*3) = 21.0253
# Three spirals
# Plot clipped at 16 cm radius
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L((16 - 3)/3, 16, 3/(2*π)) = 612.753
L((16 - 2)/3, 16, 3/(2*π)) = 674.545
L((16 - 1)/3, 16, 3/(2*π)) = 738.432
# This soultion will use three spirals of different length, in parallel.
Δ := 3.5, 3.55 .. 4
# A gap of 3.8 yields 22 ga for the middle sprial
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Δ := 3.8
# Plot clipped at 16 cm radius
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L((16 - 3*Δ/3)/Δ, 16, 3.8/(2*π)) = 445.98
L((16 - 2*Δ/3)/Δ, 16, Δ/(2*π)) = 506.382
L((16 - Δ/3)/Δ, 16, Δ/(2*π)) = 569.436
# This soultion will use three spirals of different length, in parallel, of 22 ga.
OLD
G(Δ) := (ln(sqrt(Ni*integral(sqrt((a + Δ/(2*π)*θ)^2 + (d/dθ(a + Δ/(2*π)*θ))^2), θ = 0 .. (Ro - Ri)/Δ*2*π)/100/Rs*4/π)*39.37) + 1.12436)/(-.11594)
Δ := 2, 2.1 .. 6
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# A gap between turns of 1.17 cm, starting at 1cm and ending at 16cm will have a length of 685 cm.
# Using 22 ga Nichrome wire with a resistivity of 10-6 Ohm-meters will result in a 2.1 Ohm resistance
Check
# From table 12 ga is .0808 in
ga(D) := (ln(D) + 1.12436)/(-.11594)
ga(.0808) = 12.0012
1*10^-6*6.85/(π*(.0808*.0254)^2/4) = 2.07067  # Ohms
# checks, 685 cm of 12 ga Nichrome is 2.1 Ohms
# Average the circumferences
(π*2 + π*32)/2*12.8 = 683.611  # cm
# Serpentine path
# Assume a serpentine path. The long runs are chords of the circle, the first run is a distance away from the perimeter termed the versine or sagitta (S). Each of N runs after that are evenly gapped by G. The last run is again S from the perimeter. The chords end a distance away from the perimeter defined by the chord and an intersection of a smaller circle of radius R. The runs are then ful chords of the smaller circle R. The connectors will be treated as straight lines connecting the runs.
# Equation for the length of a chord
# Solve for the chord
r == c^2/(8*s) + s/2  # the radius of a circles that just encloses a chord of length C with sagitta S
c(r, s) := 2*sqrt(s)*sqrt(2*r - s)  # the length of a chord of a circle r with sagitta s
N(D, Δ, s) := (D - 2*s)/Δ + 1  # Number of runs in a circle of diameter D, sagitta s and gap Δ
Ls(d, r, s, N) :=
    Δ ← (d - 2*s)/(N - 1)
    k ← 0
    L ← 0
    pl ← 0
    for n ∈ 0 .. N - 1
        pc ← c(r, s - (d/2 - r) + n*Δ)
        Q[k, 0] ← pc
        L ← L + pc
        if n > 0
            gl ← sqrt(Δ^2 + ((pc - pl)/2)^2)
            Q[k, 1] ← gl
            L ← L + gl
        pl ← pc
        k ← k + 1
    Q
Ls(32, 15, 1.5, 10) = [
    7.68115, 0;
    19.78, 6.85405;
    25.3068, 4.24489;
    28.3999, 3.57416;
    29.8265, 3.30022;
    29.8265, 3.22222;
    28.3999, 3.30022;
    25.3068, 3.57416;
    19.78, 4.24489;
    7.68115, 6.85405
]
C(S, r) := □  # error: This placeholder is empty.
P(C) := C + 1
Δ := 2  # Δ/2 is the distance from the circles perimeter to the first track, and Δ is the gap therafter
N := 8  # N is the number of chords
N(D, Δ) := (D - Δ)/Δ + 1
r == y^2/(8*x) + x/2  # r is the radius that just fits chord y abd sagitta x, x is Δ/2
r := 14*2.54/2
r = 17.78  # cm
x := 35
[2*sqrt(x)*sqrt(2*r - x); -2*sqrt(x)*sqrt(2*r - x)] = [8.85438; -8.85438]
path := sum(□, k = 1 .. 16)  # error: This placeholder is empty.
path =  # error: This variable is undefined.
sagitta := 1
N := 16
Δ := (r*2 - sagitta*2)/N
s + k*((r*2 - s*2)/N)
lopoff := sagitta
path(N, s, l) := sum(2*sqrt(s + k*((r*2 - s*2)/N))*sqrt(2*r - (s + k*((r*2 - s*2)/N))) - 2*l, k = 0 .. N - 1)
path(7, 1, 1) = 185.802
Rh := 2.1
ga(N, s, l) := ga(sqrt(path(N, s, l)/100*Ni/Rh*4/π)*39.37)
path(8, 1, 1) = 213.372
ga(7, 1, 2) = 18.0265
(r*2 - 1*2)/7 = 4.79429
