# Plate is 14 inches diameter
# Archimedes Spiral
Dia := 14*2.54
Dia = 35.56
Δ := 1  # gap between turns
Ro := Dia/2 - 1.5  # Outer radius, cm
Ro = 16.28
Ri := 1  # Inner Radius, cm
N := (Ro - Ri)/Δ  # number of turns
N = 15.28
r(θ, a, b) := a + b*θ  # Archimedes Spiral
a := Ri  # Start radius
b := Δ/(2*π)
b = 0.159155
λ := 0, π/60 .. N*2*π
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# Solve for length
L(N, a, b) := integral(sqrt((a + b*θ)^2 + (d/dθ(a + b*θ))^2), θ = 0 .. N*2*π)
L(N, a, b) = 829.723  # cm
# Solve for the diameter and hence the wires gage
Watts := 250
Volts := 23  # Heater requirements
Rs := Volts^2/Watts
Rs = 2.116  # Required Resistance
Ohm - meters  # Resistivity of Nichome, Adjusted to man data for 80/20 nichrome wire
Ni := 1*10^-6/.917
A(N, a, b, Rs) := Ni*L(N, a, b)/100/Rs  # m2  # Area as a function of N,a,b and resistance
D(N, a, b, Rs) := sqrt(A(N, a, b, Rs)*4/π)*39.37  # Inches  # Diameter as a function of length and resistance
D(N, a, b, Rs) = 0.0918638
G(N, a, b, Rs) := (ln(D(N, a, b, Rs)) + 1.12436)/(-.11594)
G(N, a, b, Rs) = 10.8943  # wire gage eguation, in inches
# 12 ga wire is a bit big
Gcheck(Din) := (ln(Din) + 1.12436)/(-.11594)
Din := .005, .006 .. .1
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# Solve graphically for a smaller gage
ga(Δ, Ro, Ri, Rs) :=
    N ← (Ro - Ri)/Δ
    a ← Ri
    b ← Δ/(2*π)
    Q ← G(N, a, b, Rs)
    Q
r(θ, a, b) := a + θ*b
λ := 0, π/100 .. 6*2*π  # more than enough radians
L((Ro - Ri)/5, Ri, 5/(2*π)) = 166.983  # cm of 18 ga
Δ := 1, 1.1 .. 6
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# a gap of 5 yields 18 ga
# a 5 cm gap may be too big for even heating of glass, especially
# Consider nested sprials
ga(1, 16, 1, Rs) = 11.0445
ga(3, 16, 1, Rs*3) = 20.5108
ga(3, 16, 2, Rs*3) = 20.5643  # three sprials of about 21 gage
ga(3, 16, 3, Rs*3) = 20.6522
# Three spirals
# Plot clipped at 16 cm radius
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L((16 - 3)/3, 1, 3/(2*π)) = 204.827
L((16 - 2)/3, 2, 3/(2*π)) = 264.389
L((16 - 1)/3, 3, 3/(2*π)) = 330.294
# This soultion will use three spirals of different length, in parallel.
Δ := 3.5, 3.55 .. 4.5  # A gap of 4.3 yields 22 ga for the middle sprial
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Δ := 4.25
# Plot clipped at Ro cm radius
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L((Ro - 3*Δ/3)/Δ, Δ, Δ/(2*π)) = 183.017
L((Ro - 2*Δ/3)/Δ, 2*Δ/3, Δ/(2*π)) = 190.571
L((Ro - Δ/3)/Δ, Δ/3, Δ/(2*π)) = 195.249
# This soultion will use three spirals of different length, in parallel, of 22 ga.
190*3/(2.54*12) = 18.7008  # feet
Ni*L((Ro - 3*Δ/3)/Δ, Δ, Δ/(2*π))/100/(.326/10^6) = 6.12217
1/(1/(Ni*L((Ro - Δ)/Δ, Δ, Δ/(2*π))/100/(.326/10^6)) + 1/(Ni*L((Ro - 2*Δ/3)/Δ, Δ*2/3, Δ/(2*π))/100/(.326/10^6)) + 1/(Ni*L((Ro - Δ/3)/Δ, Δ/3, Δ/(2*π))/100/(.326/10^6))) = 2.11276
# Check on resistivity
Ni = 1.09051e-6
A(N, a, b, Rs) := Ni*L(N, a, b)/100/Rs  # m2  # Expresion to find the required area(m^2) from length(cm) and resistance
Acheck(L, Rs) := Ni*L/(100*Rs)
Acheck(100, 138.8)*10^6/.007845 = 1.00149  # mm^2  # Close to man data
Acheck(100, 6.835)*10^6/.1590 = 1.00345  # mm^2
# Close to man data
Acheck(100, .1542)*10^6 = 7.07207
Acheck(265, 2.1)*10^6 = 1.37612
Acheck(100, .1542)*10^6/7.089 = 0.997611
# Serpentine path
# Assume a serpentine path. The long runs are chords of the circle, the first run is a distance away from the perimeter termed the versine or sagitta (S). Each of N runs after that are evenly gapped by G. The last run is again S from the perimeter. The chords end a distance away from the perimeter defined by the chord and an intersection of a smaller circle of radius R. The runs are then ful chords of the smaller circle R. The connectors will be treated as straight lines connecting the runs.
# Equation for the length of a chord
# Solve for the chord
r == c^2/(8*s) + s/2  # the radius of a circles that just encloses a chord of length C with sagitta S
c(r, s) := 2*sqrt(s)*sqrt(2*r - s)  # the length of a chord of a circle r with sagitta s
N(D, Δ, s) := (D - 2*s)/Δ + 1  # Number of runs in a circle of diameter D, sagitta s and gap Δ
Ls(d, r, s, N) :=
    Δ ← (d - 2*s)/(N - 1)
    k ← 0
    L ← 0
    pl ← 0
    for n ∈ 0 .. N - 1
        pc ← c(r, s - (d/2 - r) + n*Δ)
        Q[k, 0] ← pc
        L ← L + pc
        if n > 0
            gl ← sqrt(Δ^2 + ((pc - pl)/2)^2)
            Q[k, 1] ← gl
            L ← L + gl
        pl ← pc
        k ← k + 1
    Q[k, 0] ← L
    Q
Ls(32, 15, 1.5, 10) = [
    7.68115, 0;
    19.78, 6.85405;
    25.3068, 4.24489;
    28.3999, 3.57416;
    29.8265, 3.30022;
    29.8265, 3.22222;
    28.3999, 3.30022;
    25.3068, 3.57416;
    19.78, 4.24489;
    7.68115, 6.85405;
    261.157, 0
]
Gas(d, r, s, N, Rs) :=
    Lall ← Ls(d, r, s, N)
    Lser ← Lall[N, 0]
    Aser ← Acheck(Lser, Rs)
    Dser ← sqrt(Aser*4/π)*39.37
    Gser ← Gcheck(Dser)
    Gser
Gas(32, 15, 1.5, 10, 2.1) = 15.8468
Ntest := 6, 7 .. 20
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Gap(N) := Ro*2/N
Gap(10) = 3.256  # Aproximate gap
