wedgeang := 90
arcangle(radc, g) := wedgeang - (g/(2*π*radc) + g/(2*π*(radc + g)))*360
lengthnum(g, rm) :=
    arclen ← 0
    N ← floor(rm/g)
    for k ∈ 0 .. N - 1
        radm ← rm - g*k
        radc ← radm - g/2
        arcang ← arcangle(radc, g)
        conang ← g*360/(2*π*radc)
        arclen ← arclen + arcang/360*radm*2*π
        Q[k] ← arcang/360*radm*2*π
    conlen ← N*π*g/2
    arclen + conlen
170/13.1 = 12.9771
lengthnum(13.1, 170) = 1774.89
n := 0 .. 419
X[n, 0] := lengthnum(8 + 0.1*n, 160)
X[n, 1] := floor(170/(8 + 0.1*n))
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